λ := 0.9
μ := 0.8
P000 := 0
P00a := 0
P0ba := 0
Pbba := 0
P00b := 0
P0bb := 0
Pbbb := 0
Given
λ*P000 == μ*P00a + 2*μ*P00b
(λ + μ)*P00a == λ*P000
(λ + μ)*P0ba == λ*P00a
μ*Pbba == λ*P0ba
(λ + 2*μ)*P0bb == μ*Pbba + 2*μ*Pbbb + λ*P00b
2*μ*Pbbb == λ*P0bb
(2*μ + λ)*P00b == μ*P0ba + 2*μ*P0bb
P000 + P00a + P0ba + Pbba + P00b + P0bb + Pbbb == 1
[P000; P00a; P0ba; Pbba; P00b; P0bb; Pbbb] := Find(P000, P00a, P0ba, Pbba, P00b, P0bb, Pbbb) → [0.341196284191; 0.180633326925; 0.095629408372; 0.107583084419; 0.101606246395; 0.110945055807; 0.0624065938912]
A := (P00a + P0ba + Pbba)*μ + (P00b + Pbbb + P0bb)*2*μ = 0.747009
Loch := P0ba + Pbba*2 + P0bb + Pbbb*2 = 0.546554
Woch := Loch/λ = 0.607282
Q := A/λ = 0.83001
Wc := Woch + ((1 - P000 - Pbba - Pbbb)/(2*μ) + P000/μ) = 1.33929
